# 3d Lennard-Jones liquid
units lj
dimension 3
boundary p p p
atom_style atomic

lattice fcc 0.844
region simbox block 0 20 0 20 0 20
create_box 1 simbox
create_atoms 1 box

mass 1 1.0

pair_style lj/cut 3.0
pair_coeff 1 1 1.0 1.0 3.0

velocity all create 1.05 87287
fix 1 all nve
run 1000
unfix 1

python create_matrix input 1 SELF format p file matrix.py
python create_matrix invoke

velocity spheres create 1.05 87287
fix 2 spheres nve
variable g atom gmask(spheres)

dump 1 all custom 10 dump.lammpstrj id type x y z vx vy vz v_g
thermo 100
run 1000
